# -*- coding: utf-8 -*-
import sys
import numpy as np

#   STLIB IMPORT
try:
    from splib3.animation import AnimationManager , animate
    from stlib3.scene.wrapper import Wrapper
    from splib3.scenegraph import *

except:
    raise ImportError("ModelOrderReduction plugin depend on SPLIB"\
                     +"Please install it : https://github.com/SofaDefrost/STLIB")

# MOR IMPORT
from mor.utility import sceneCreation
from mor.wrapper import replaceAndSave

# Our Phase1 Scene IMPORT
import phase1_snapshots

# Scene parameters
phase = []
#for $item in $PHASE
phase.append($item)
#end for
nbrOfModes = $NBROFMODES
periodSaveGIE = $PERIODSAVEGIE
paramWrapper = $PARAMWRAPPER

path, param = paramWrapper
param['nbrOfModes'] = $NBROFMODES

###############################################################################

def createScene(rootNode):

    # Import Original Scene with the animation added
    # Here we use a wrapper (MORWrapper) that will allow us (with MORreplace)
    # to modify the initial scene and get informations on its structures
    # For more details on the process involved additionnal doc are with :
    #       - mor.wrapper.MORWrapper
    #       - mor.script.sceneCreationUtility

    phase1_snapshots.createScene(Wrapper(rootNode, replaceAndSave.MORreplace, paramWrapper))

    # Add MOR plugin if not found
    #u.addPlugin(rootNode,"ModelOrderReduction")

    # Modify the scene to perform hyper-reduction according
    # to the informations collected by the wrapper

    sceneCreation.modifyGraphScene(rootNode,nbrOfModes,paramWrapper)


    # We Update the link
    for path , item in replaceAndSave.pathToUpdate.items():
        data , newValue = item
        obj = get(rootNode,path)
        setattr(obj,data,newValue)
