# -*- coding: utf-8 -*-

import os
import sys

#   STLIB IMPORT
from stlib3.scene import MainHeader
from stlib3.solver import DefaultSolver
from stlib3.physics.deformable import ElasticMaterialObject
from stlib3.physics.constraints import FixedBox

# SOFTROBOTS IMPORT
from softrobots.actuators import PullingCable

actuatorsParam = [
        {'withName' : 'nord',
         'withCableGeometry' : [[0, 97, 45]],
         'withAPullPointLocation' : [0, 10, 30]
        },
        {'withName' : 'ouest',
         'withCableGeometry' : [[-97, 0, 45]],
         'withAPullPointLocation' : [-10, 0, 30]
        },
        {'withName' : 'sud',
         'withCableGeometry' : [[0, -97, 45]],
         'withAPullPointLocation' : [0, -10, 30]
        },
        {'withName' : 'est',
         'withCableGeometry' : [[97, 0, 45]],
         'withAPullPointLocation' : [10, 0, 30]
        }
    ]

meshPath = os.path.dirname(os.path.abspath(__file__))+'/mesh/'

def createScene(rootNode):

    rootNode.createObject('VisualStyle', displayFlags='showVisualModels showForceFields')

    rootNode.findData('gravity').value=[0.0,0.0,-9810];
    rootNode.findData('dt').value=1

    plugins=["SofaPython","SoftRobots","ModelOrderReduction"]
    for name in plugins:
        rootNode.createObject('RequiredPlugin', name=name, printLog=False)

    rootNode.createObject('OglSceneFrame', style="Arrows", alignment="TopRight")

    rootNode.createObject('FreeMotionAnimationLoop')
    rootNode.createObject('GenericConstraintSolver', tolerance="1e-6", maxIterations="1000")


    modelNode = ElasticMaterialObject(
        attachedTo=rootNode,
        volumeMeshFileName=meshPath+'siliconeV0.vtu',
        name='modelNode',
        rotation=[90, 0.0, 0.0],
        translation=[0.0, 0.0, 35],
        totalMass=0.5,
        withConstrain=False,
        surfaceMeshFileName=meshPath+'surface.stl',
        surfaceColor=[0.7, 0.7, 0.7, 0.7],
        poissonRatio=0.45,
        youngModulus=450)

    modelNode.createObject('GenericConstraintCorrection', solverName='solver')

    FixedBox(
        atPositions=[-15, -15, -40,  15, 15, 10],
        applyTo=modelNode,
        doVisualization=True)

    for i in range(len(actuatorsParam)):
        cable = PullingCable(
                    attachedTo=modelNode,
                    name=actuatorsParam[i]['withName'],
                    cableGeometry=actuatorsParam[i]['withCableGeometry'],
                    pullPointLocation=actuatorsParam[i]['withAPullPointLocation'],
                    valueType="displacement")

    return rootNode
